// SBML level 3 version 2
// Created with https://github.com/matthiaskoenig/sbmlutils.

model canagliflozin_intestine(PODOSE_can, Ka_dis_can, Mr_can, Vext, Vgu, Vlumen, Vfeces, Vstomach, can_lumen, can_ext, can_feces, m7_lumen, m9_lumen, m7_feces, m9_feces, cantot_feces)
  // Model for canagliflozin absorption in the small intestine
  // Model for canagliflozin absorption
  // absorption canagliflozin (can)
  // fraction absorbed: 0.59 (41% in feces)
  // enterohepatische circulation (M5?, M7?, M9?)
  // Terms of use
  // The content of this model has been carefully created in a manual research effort. This file has been created by Matthias König using sbmlutils. For questions contact koenigmx@hu-berlin.de. Copyright © 2024 Matthias König.
  // This work is licensed under a Creative Commons Attribution 4.0 International License.
  // Redistribution and use of any part of this model, with or without modification, are permitted provided that the following conditions are met:
  // Redistributions of this SBML file must retain the above copyright notice, this list of conditions and the following disclaimer.
  // Redistributions in a different form must reproduce the above copyright notice, this list of conditions and the following disclaimer in the documentation and/or other materials provided with the distribution.
  // This model is distributed in the hope that it will be useful, but WITHOUT ANY WARRANTY; without even the implied warranty of MERCHANTABILITY or FITNESS FOR A PARTICULAR PURPOSE.
  // model units - substance: mmole, time: min, volume: litre, area: m2, length: metre, extent: mmole

  // Compartments:
  compartment Vext = 1 litre; Vext is "plasma";  // SBO:0000290 ncit:C13356 BTO:0000131
  compartment Vgu = 1.2825 litre; Vgu is "intestine";  // SBO:0000290 FMA:45615 BTO:0000545 ncit:C12736
  compartment Vlumen = 1.15425 litre; Vlumen is "intestinal lumen (inner part of intestine)";  // SBO:0000290 FMA:14586 UBERON:0018543
  compartment Vfeces = 1 litre;  // SBO:0000290 FMA:64183 ncit:C13234 BTO:0000440
  compartment Ventero = 1 litre; Ventero is "intestinal lining (enterocytes)";  // SBO:0000290
  compartment Vapical = NaN; Vapical has m2; Vapical is "apical membrane (intestinal membrane enterocytes)";  // 2-D; SBO:0000290 FMA:84666 GO:0016324
  compartment Vbaso = NaN; Vbaso has m2; Vbaso is "basolateral membrane (intestinal membrane enterocytes)";  // 2-D; SBO:0000290 FMA:84669 GO:0016323
  compartment Vstomach = 1 litre;  // SBO:0000290 FMA:7148 ncit:C12391 UBERON:0000945

  // Species:
  substanceOnly species $can_stomach in Vstomach = 0; can_stomach is "canagliflozin (stomach)";  // SBO:0000247 pubchem.compound:24812758 CHEBI:73274 ncit:C91018
  species can_lumen in Vlumen = 0; can_lumen is "canagliflozin (intestinal volume)";  // SBO:0000247 pubchem.compound:24812758 CHEBI:73274 ncit:C91018
  species can_ext in Vext = 0; can_ext is "canagliflozin (plasma)";  // SBO:0000247 pubchem.compound:24812758 CHEBI:73274 ncit:C91018
  substanceOnly species can_feces in Vfeces = 0; can_feces is "canagliflozin (feces)";  // SBO:0000247 pubchem.compound:24812758 CHEBI:73274 ncit:C91018
  species m7_lumen in Vlumen = 0; m7_lumen is "M7 (intestinal volume)";  // SBO:0000247 pubchem.compound:169502148 inchikey:TYOYRLJPOYQWCE-OGMAXQODSA-N
  species m9_lumen in Vlumen = 0; m9_lumen is "M9 (intestinal volume)";  // SBO:0000247 pubchem.compound:121428312 inchikey:IXYKXBFQESXJOP-WNTZTFLTSA-N
  substanceOnly species m7_feces in Vfeces = 0; m7_feces is "M7 (feces)";  // SBO:0000247 pubchem.compound:169502148 inchikey:TYOYRLJPOYQWCE-OGMAXQODSA-N
  substanceOnly species m9_feces in Vfeces = 0; m9_feces is "M9 (feces)";  // SBO:0000247 pubchem.compound:121428312 inchikey:IXYKXBFQESXJOP-WNTZTFLTSA-N
  // Used for comparison with total radioactivity in feces.
  substanceOnly species cantot_feces in Vfeces; cantot_feces is "total canagliflozin (feces)";  // SBO:0000247

  // Parameters:
  // Fraction absorbed, i.e., only a fraction of the canagliflozin in the intestinal lumen is absorbed. This parameter determines how much of the canagliflozin is excreted.
  // F_can_abs of dose is absorbed. (1-F_can_abs) is excreted in feces.
  // fraction absorbed: 0.59; ~41% in the feces
  F_can_abs = 0.59 dimensionless; F_can_abs is "fraction absorbed canagliflozin";  // SBO:0000002
  CANABS_k = 0.1 per_min; CANABS_k is "rate of canagliflozin absorption";  // SBO:0000009
  // 1.0: normal absorption corresponding to tablet under fasting conditions.
  // food decreases the absorption rate, i.e. < 1.0.
  f_absorption = 1 dimensionless; f_absorption is "scaling factor for absorption rate";  // SBO:0000009
  PODOSE_can = 0 mg; PODOSE_can is "oral dose canagliflozin [mg]";  // SBO:0000002
  Ka_dis_can = 2 per_hr; Ka_dis_can is "Ka_dis [1/hr] dissolution canagliflozin";  // SBO:0000002
  Mr_can = 444.518 g_per_mole; Mr_can is "Molecular weight canagliflozin [g/mole]";  // SBO:0000647
  CANEX_k = 1 per_min; CANEX_k is "rate feces excretion of canagliflozin";  // SBO:0000009
  M7EX_k = 0.33 per_min; M7EX_k is "rate feces excretion of m7";  // SBO:0000009
  M9EX_k = 0.33 per_min; M9EX_k is "rate feces excretion of m9";  // SBO:0000009
  absorption has mmole_per_min; absorption is "absorption canagliflozin";

  // Assignment rules:
  absorption := f_absorption*CANABS_k*Vgu*can_lumen;
  cantot_feces := can_feces + m7_feces + m9_feces;

  // Rate rules:
  PODOSE_can' = -dissolution_can*Mr_can;

  // Reactions:
  CANABS: can_lumen => can_ext; F_can_abs*absorption; CANABS is "absorption canagliflozin";  // SBO:0000655
  CANEXC: can_lumen => can_feces; (1 - F_can_abs)*absorption; CANEXC is "excretion canagliflozin (feces)";  // SBO:0000655
  // Assumption: same rate as CANABS for simplification.
  M7EXC: m7_lumen => m7_feces; CANABS_k*Vgu*m7_lumen; M7EXC is "excretion M7 (feces)";  // SBO:0000655
  // Assumption: same rate as CANABS for simplification.
  M9EXC: m9_lumen => m9_feces; CANABS_k*Vgu*m9_lumen; M9EXC is "excretion M9 (feces)";  // SBO:0000655
  // Swallowing, dissolution of tablet, and transport into intestine. Overall process describing the rates of this processes.
  dissolution_can: $can_stomach => can_lumen; Ka_dis_can/(60 min_per_hr)*PODOSE_can/Mr_can; dissolution_can is "dissolution canagliflozin";

  // Unit definitions:
  unit g_per_mole = gram / mole; g_per_mole is "g/mole";
  unit l_per_min = litre / (60 second); l_per_min is "l/min";
  unit m2 = metre^2; m2 is "meter^2";
  unit mM = 1e-3 mole / litre; mM is "mmole/liter";
  unit mg = 1e-3 gram;
  unit mg_per_min = 1e-3 gram / (60 second); mg_per_min is "mg/min";
  unit mg_per_s_l = 1e-3 gram / (second * litre); mg_per_s_l is "mg/s/l";
  unit min = 60 second;
  unit min_per_hr = 60 second / (3600 second); min_per_hr is "min/hour";
  unit mmole = 1e-3 mole;
  unit mmole_per_min = 1e-3 mole / (60 second); mmole_per_min is "mmole/min";
  unit mmole_per_min_l = 1e-3 mole / (60 second * litre); mmole_per_min_l is "mmole/min/l";
  unit per_hr = 1 / (3600 second); per_hr is "1/hr";
  unit per_min = 1 / (60 second); per_min is "1/min";
  unit per_mmole = 1 / (1e-3 mole); per_mmole is "1/mmole";
end
