// SBML level 3 version 2
// Created with https://github.com/matthiaskoenig/sbmlutils.

model canagliflozin_kidney(CAN2M7_Vmax, CAN2M7_Km_can, Vext, Vki, Vurine, can_ext, can_urine, m5_ext, m5_urine, m7_ext, m7, m7_urine, cantot_urine, glc_urine)
  // Model for renal canagliflozin, M5 and M7 excretion.
  // Canagliflozin is eliminated urine (33%, mainly O-glucuronide metabolites) [Deeks2017]
  // ~33 % of the oral dose was excreted in urine (M5: 13.3 %, M7: 17.2 %, canagliflozin <1%) [Devineni2015h]
  // => mainly renal excretion of M5 and M7, small excretion of can
  // The content of this model has been carefully created in a manual research effort.
  // Terms of use
  // Copyright © 2026 Matthias König.
  // This work is licensed under a Creative Commons Attribution 4.0 International License.
  // Redistribution and use of any part of this model, with or without modification, are permitted provided that the following conditions are met:
  // Redistributions of this SBML file must retain the above copyright notice, this list of conditions and the following disclaimer.
  // Redistributions in a different form must reproduce the above copyright notice, this list of conditions and the following disclaimer in the documentation and/or other materials provided with the distribution.
  // This model is distributed in the hope that it will be useful, but WITHOUT ANY WARRANTY; without even the implied warranty of MERCHANTABILITY or FITNESS FOR A PARTICULAR PURPOSE.
  // hasTaxon taxonomy:9606 snomedct:337915000
  // hasProperty mamo:MAMO_0000046 ncit:C91018 ncit:C98083 ncit:C15299 ncit:C2985 ncit:C99532
  // isDescribedBy doi:10.20944/preprints202601.2095.v1 doi:10.5281/zenodo.13759839
  // occursIn FMA:7203 BTO:0000671 ncit:C12415
  // model units - substance: mmole, time: min, volume: litre, area: m2, length: metre, extent: mmole

  // Compartments:
  compartment Vext = 1.5 litre; Vext is "plasma";  // SBO:0000290 ncit:C13356 BTO:0000131
  compartment Vki = 0.3 litre; Vki is "kidney";  // SBO:0000290 FMA:7203 BTO:0000671 ncit:C12415
  compartment Vmem = NaN; Vmem has m2; Vmem is "plasma membrane";  // 2-D; SBO:0000290 ncit:C13735 FMA:63841 GO:0005886
  compartment Vurine = 1 litre;  // SBO:0000290 FMA:12274 ncit:C13283 BTO:0001419

  // Species:
  species can_ext in Vext = 0; can_ext is "canagliflozin (plasma)";  // SBO:0000247 pubchem.compound:24812758 CHEBI:73274 ncit:C91018
  species can in Vki = 0; can is "canagliflozin (kidney)";  // SBO:0000247 pubchem.compound:24812758 CHEBI:73274 ncit:C91018
  substanceOnly species can_urine in Vurine = 0; can_urine is "canagliflozin (urine)";  // SBO:0000247 pubchem.compound:24812758 CHEBI:73274 ncit:C91018
  species m5_ext in Vext = 0; m5_ext is "M5 (plasma)";  // SBO:0000247 pubchem.compound:169502150 inchikey:TZIBMGFJORCASO-DUGGDNAASA-N
  substanceOnly species m5_urine in Vurine = 0; m5_urine is "M5 (urine)";  // SBO:0000247 pubchem.compound:169502150 inchikey:TZIBMGFJORCASO-DUGGDNAASA-N
  species m7_ext in Vext = 0; m7_ext is "M7 (plasma)";  // SBO:0000247 pubchem.compound:169502148 inchikey:TYOYRLJPOYQWCE-OGMAXQODSA-N
  species m7 in Vki = 0; m7 is "M7 (kidney)";  // SBO:0000247 pubchem.compound:169502148 inchikey:TYOYRLJPOYQWCE-OGMAXQODSA-N
  substanceOnly species m7_urine in Vurine = 0; m7_urine is "M7 (urine)";  // SBO:0000247 pubchem.compound:169502148 inchikey:TYOYRLJPOYQWCE-OGMAXQODSA-N
  // Used for comparison with total radioactivity in urine.
  substanceOnly species cantot_urine in Vurine; cantot_urine is "total canagliflozin (urine)";  // SBO:0000247
  // Fasting plasma glucose (FPG). Model depends on the fasting plasma glucose:
  // as a proxy of the daily glucose variation in the glucose excretion
  // to set the glucose dependent RTG values (i.e. T2DM have higher SGLT2 amounts, and consequently higher RTG values)
  species $fpg in Vext = 5; fpg is "fasting plasma glucose (FPG)";  // SBO:0000247 CHEBI:4167 ncit:C2831
  substanceOnly species glc_urine in Vurine = 0; glc_urine is "glucose (urine)";  // SBO:0000247 CHEBI:4167 ncit:C2831

  // Parameters:
  // scaling factor for renal function. 1.0: normal renal function; <1.0: reduced renal function
  f_renal_function = 1 dimensionless; f_renal_function is "scaling factor renal function";  // SBO:0000009
  // Scaling factor to vary UGT1A9 activity in kidney. 1.0: normal activity; <1.0 decreased activity; >1.0 increased activity.
  f_ugt1a9 = 1 dimensionless; f_ugt1a9 is "scaling factor UGT1A9 activity";  // SBO:0000002
  CAN2M7_Vmax = 0.03875783 mmole_per_min_l; CAN2M7_Vmax is "Vmax canagliflozin to M7";  // SBO:0000186
  CAN2M7_Km_can = 0.1 mM; CAN2M7_Km_can is "Km canagliflozin UGT1A9";  // SBO:0000027
  Mr_glc = 180 g_per_mole; Mr_glc is "molecular weight glc";  // SBO:0000647
  cf_mg_per_g = 1000 mg_per_g; cf_mg_per_g is "Conversion factor mg per g";
  cf_ml_per_l = 1000 ml_per_l; cf_ml_per_l is "Conversion factor ml per l";
  GFR_healthy = 100 ml_per_min; GFR_healthy is "Glomerular filtration rate (healthy)";
  // estimated EC50 value was 32 ng/mL (95% CI = 19–45 ng/mL). [Devineni2013]
  RTG_E50 = 1.672069e-5 mM; RTG_E50 is "EC50 reduction in RTG";  // SBO:0000009
  RTG_gamma = 1 dimensionless; RTG_gamma is "hill coefficient reduction in RTG";  // SBO:0000009
  // Typical RTG value without SGLT2 inhibitors in healthy subjects.
  // This corresponds to the SGLT2 concentrations.
  RTG_base = 9.003932 mM; RTG_base is "Baseline RTG value";
  // Effect of the FPG on the change in RTG_base.
  RTG_m_fpg = 0.7104098 dimensionless; RTG_m_fpg is "FPG effect on RTG";
  // maximum inhibition of RTG via SGLT2
  RTG_max_inhibition = 0.6272697 dimensionless; RTG_max_inhibition is "RTG maximum inhibition";
  fpg_healthy = 5 mM; fpg_healthy is "fasting plasma glucose (healthy)";
  CANIM_Vmax = 10 mmole_per_min_l; CANIM_Vmax is "Vmax canagliflozin import";  // SBO:0000186
  CANIM_Km_can = 0.1 mM; CANIM_Km_can is "Km canagliflozin import";  // SBO:0000027
  M7IM_Vmax = 10 mmole_per_min_l; M7IM_Vmax is "Vmax M7 transport";  // SBO:0000186
  M7IM_Km_m7 = 0.1 mM; M7IM_Km_m7 is "Km M7 transport";  // SBO:0000027
  // Scaling factor relative to liver UGT1A9 activity. 1.0 = equal to liver, < 1.0 = lower, > 1.0 = higher.
  f_CAN2M7 = 0.1394143 dimensionless; f_CAN2M7 is "scaling factor CAN2M7 kidney vs liver";  // SBO:0000002
  CANEX_k = 0.003745817 per_min; CANEX_k is "rate urinary excretion of canagliflozin";  // SBO:0000009
  M5EX_k = 0.1109545 per_min; M5EX_k is "rate urinary excretion of m5";  // SBO:0000009
  M7EX_k = 0.1867348 per_min; M7EX_k is "rate urinary excretion of m7";  // SBO:0000009
  RTG_fpg has mM; RTG_fpg is "RTG value (FPG)";
  RTG_delta has mM; RTG_delta is "RTG value";
  RTG has mM; RTG is "renal threshold glucose (RTG)";
  GFR has ml_per_min; GFR is "glomerular filtration rate";
  UGE has gram; UGE is "urinary glucose excretion (UGE)";

  // Assignment rules:
  cantot_urine := can_urine + m5_urine + m7_urine;
  // FPG dependent base RTG value. SGLT2 is induced in T2DM [Rahmoune2005]
  RTG_fpg := RTG_base + RTG_m_fpg*(fpg - fpg_healthy);
  // ΔRTG, maximum reduction in RTG due to SGLT2 inhibition. Normally around 7 - 10 mM.
  RTG_delta := RTG_fpg*RTG_max_inhibition;
  // Renal threshold glucose.
  // The renal threshold for glucose (RTG) is the plasma glucose concentration at which tubular reabsorption of glucose begins to saturate; glucose is excreted into the urine in direct proportion to the glucose concentration above this threshold. 12.3 - 12.7 mM RTG (placebo) [Devineni2012]
  RTG := RTG_fpg - RTG_delta*can_ext^RTG_gamma/(RTG_E50^RTG_gamma + can_ext^RTG_gamma);
  GFR := f_renal_function*GFR_healthy;
  // Urinary glucose excretion is calculated from cumulative amount of glucose in urine.
  UGE := glc_urine*Mr_glc/cf_mg_per_g;

  // Reactions:
  CANIM: can_ext -> can; f_renal_function*CANIM_Vmax/CANIM_Km_can*Vki*(can_ext - can)/(1 + can_ext/CANIM_Km_can + can/CANIM_Km_can);  // SBO:0000655
  M7IM: m7_ext -> m7; f_renal_function*M7IM_Vmax/M7IM_Km_m7*Vki*(m7_ext - m7)/(1 + m7_ext/M7IM_Km_m7 + m7/M7IM_Km_m7);  // SBO:0000655
  CAN2M7: can => m7; f_renal_function*f_ugt1a9*f_CAN2M7*CAN2M7_Vmax*Vki*can/(can + CAN2M7_Km_can); CAN2M7 is "UGT1A9 (can -> m7)";  // SBO:0000176
  CANEX: can_ext => can_urine; f_renal_function*CANEX_k*Vki*can_ext; CANEX is "canagliflozin excretion (CANEX)";  // SBO:0000655
  M5EX: m5_ext => m5_urine; f_renal_function*M5EX_k*Vki*m5_ext; M5EX is "M5 excretion (M5EX)";  // SBO:0000655
  M7EX: m7_ext => m7_urine; f_renal_function*M7EX_k*Vki*m7_ext; M7EX is "M7 excretion (M7EX)";  // SBO:0000655
  GLCEX: $fpg => glc_urine; piecewise(GFR/cf_ml_per_l*(fpg - RTG), fpg > RTG, 0 mmole_per_min); GLCEX is "glucose excretion (GLCEX)";  // modifiers: can_ext; SBO:0000655

  // Unit definitions:
  unit g_per_mole = gram / mole; g_per_mole is "g/mole";
  unit l_per_min = litre / (60 second); l_per_min is "l/min";
  unit m2 = metre^2; m2 is "meter^2";
  unit mM = 1e-3 mole / litre; mM is "mmole/liter";
  unit mg = 1e-3 gram;
  unit mg_per_g = 1e-3 gram / gram; mg_per_g is "mg/g";
  unit mg_per_s_l = 1e-3 gram / (second * litre); mg_per_s_l is "mg/s/l";
  unit min = 60 second;
  unit min_per_hr = 60 second / (3600 second); min_per_hr is "min/hour";
  unit ml_per_l = 1e-3 litre / litre; ml_per_l is "ml/l";
  unit ml_per_min = 1e-3 litre / (60 second); ml_per_min is "ml/min";
  unit mmole = 1e-3 mole;
  unit mmole_per_min = 1e-3 mole / (60 second); mmole_per_min is "mmole/min";
  unit mmole_per_min_l = 1e-3 mole / (60 second * litre); mmole_per_min_l is "mmole/min/l";
  unit per_min = 1 / (60 second); per_min is "1/min";
  unit per_mmole = 1 / (1e-3 mole); per_mmole is "1/mmole";
end
