// SBML level 3 version 2
// Created with https://github.com/matthiaskoenig/sbmlutils.

model canagliflozin_liver(Vext, Vli, Vbi, Vlumen, can_ext, m5_ext, m7_ext, m7_lumen, m9_lumen)
  // Model for hepatic canagliflozin metabolism.
  // Model for canagliflozin metabolism.
  // Terms of use
  // The content of this model has been carefully created in a manual research effort. This file has been created by Matthias König using sbmlutils. For questions contact koenigmx@hu-berlin.de. Copyright © 2024 Matthias König.
  // This work is licensed under a Creative Commons Attribution 4.0 International License.
  // Redistribution and use of any part of this model, with or without modification, are permitted provided that the following conditions are met:
  // Redistributions of this SBML file must retain the above copyright notice, this list of conditions and the following disclaimer.
  // Redistributions in a different form must reproduce the above copyright notice, this list of conditions and the following disclaimer in the documentation and/or other materials provided with the distribution.
  // This model is distributed in the hope that it will be useful, but WITHOUT ANY WARRANTY; without even the implied warranty of MERCHANTABILITY or FITNESS FOR A PARTICULAR PURPOSE.
  // model units - substance: mmole, time: min, volume: litre, area: m2, length: metre, extent: mmole

  // Compartments:
  compartment Vext = 1.5 litre; Vext is "plasma";  // SBO:0000290 ncit:C13356 BTO:0000131
  compartment Vli = 1.5 litre; Vli is "liver";  // SBO:0000290 FMA:7197 BTO:0000759 ncit:C12392
  compartment Vmem = NaN; Vmem has m2; Vmem is "plasma membrane";  // 2-D; SBO:0000290 ncit:C13735 FMA:63841 GO:0005886
  compartment Vapical = NaN; Vapical has m2; Vapical is "apical membrane";  // 2-D; SBO:0000290 FMA:84666 GO:0016324
  compartment Vbi = 1 litre; Vbi is "bile";  // SBO:0000290 FMA:62971 ncit:C13192
  compartment Vlumen = 1.15425 litre; Vlumen is "intestinal lumen (inner part of intestine)";  // SBO:0000290 FMA:14586 UBERON:0018543

  // Species:
  species can_ext in Vext = 0; can_ext is "canagliflozin (plasma)";  // SBO:0000247 pubchem.compound:24812758 CHEBI:73274 ncit:C91018
  species m5_ext in Vext = 0; m5_ext is "M5 (plasma)";  // SBO:0000247 pubchem.compound:169502150 inchikey:TZIBMGFJORCASO-DUGGDNAASA-N
  species m7_ext in Vext = 0; m7_ext is "M7 (plasma)";  // SBO:0000247 pubchem.compound:169502148 inchikey:TYOYRLJPOYQWCE-OGMAXQODSA-N
  species can in Vli = 0; can is "canagliflozin (liver)";  // SBO:0000247 pubchem.compound:24812758 CHEBI:73274 ncit:C91018
  species m5 in Vli = 0; m5 is "M5 (liver)";  // SBO:0000247 pubchem.compound:169502150 inchikey:TZIBMGFJORCASO-DUGGDNAASA-N
  species m7 in Vli = 0; m7 is "M7 (liver)";  // SBO:0000247 pubchem.compound:169502148 inchikey:TYOYRLJPOYQWCE-OGMAXQODSA-N
  species m9 in Vli = 0; m9 is "M9 (liver)";  // SBO:0000247 pubchem.compound:121428312 inchikey:IXYKXBFQESXJOP-WNTZTFLTSA-N
  // Bile M7 in amount.
  substanceOnly species m7_bi in Vbi = 0; m7_bi is "M7 (bile)";  // SBO:0000247 pubchem.compound:169502148 inchikey:TYOYRLJPOYQWCE-OGMAXQODSA-N
  // Bile M9 in amount.
  substanceOnly species m9_bi in Vbi = 0; m9_bi is "M9 (bile)";  // SBO:0000247 pubchem.compound:121428312 inchikey:IXYKXBFQESXJOP-WNTZTFLTSA-N
  species m7_lumen in Vlumen = 0; m7_lumen is "M7 (lumen)";  // SBO:0000247 pubchem.compound:169502148 inchikey:TYOYRLJPOYQWCE-OGMAXQODSA-N
  species m9_lumen in Vlumen = 0; m9_lumen is "M9 (lumen)";  // SBO:0000247 pubchem.compound:121428312 inchikey:IXYKXBFQESXJOP-WNTZTFLTSA-N

  // Parameters:
  // scaling factor for hepatic function. 1.0: normal hepatic function; <1.0: reduced hepatic function
  f_hepatic_function = 1 dimensionless; f_hepatic_function is "parameter for renal function";  // SBO:0000009
  CANIM_Vmax = 1000 mmole_per_min_l; CANIM_Vmax is "Vmax canagliflozin import";  // SBO:0000186
  CANIM_Km_can = 0.1 mM; CANIM_Km_can is "Km canagliflozin import";  // SBO:0000027
  CAN2M5_Vmax = 0.04 mmole_per_min_l; CAN2M5_Vmax is "Vmax canagliflozin conversion";  // SBO:0000186
  CAN2M5_Km_can = 0.1 mM; CAN2M5_Km_can is "Km canagliflozin UGT2B4";  // SBO:0000027
  // Scaling factor to vary UGT2B4 activity. 1.0: unchanged activity; < 1.0 decreased activity; >1.0 increased activity.
  f_ugt2b4 = 1 dimensionless; f_ugt2b4 is "scaling factor UGT2B4 activity";  // SBO:0000002
  CAN2M7_Vmax = 0.04 mmole_per_min_l; CAN2M7_Vmax is "Vmax canagliflozin conversion";  // SBO:0000186
  CAN2M7_Km_can = 0.1 mM; CAN2M7_Km_can is "Km canagliflozin UGT1A9";  // SBO:0000027
  // Scaling factor to vary UGT1A9 activity. 1.0: unchanged activity; < 1.0 decreased activity; >1.0 increased activity.
  f_ugt1a9 = 1 dimensionless; f_ugt1a9 is "scaling factor UGT1A9 activity";  // SBO:0000002
  CAN2M9_Vmax = 0.04 mmole_per_min_l; CAN2M9_Vmax is "Vmax canagliflozin conversion";  // SBO:0000186
  CAN2M9_Km_can = 0.1 mM; CAN2M9_Km_can is "Km canagliflozin CYP3A4";  // SBO:0000027
  // Scaling factor to vary CYP3A4 activity. 1.0: unchanged activity; < 1.0 decreased activity; >1.0 increased activity.
  f_cyp3a4 = 1 dimensionless; f_cyp3a4 is "scaling factor CYP3A4 activity";  // SBO:0000002
  M5EX_Vmax = 1000 mmole_per_min_l; M5EX_Vmax is "Vmax M5 export";  // SBO:0000186
  M5EX_Km_m5 = 0.1 mM; M5EX_Km_m5 is "Km M5 export";  // SBO:0000027
  M7EX_Vmax = 1000 mmole_per_min_l; M7EX_Vmax is "Vmax M7 export";  // SBO:0000186
  M7EX_Km_m7 = 0.1 mM; M7EX_Km_m7 is "Km M7 export";  // SBO:0000027
  MBIEX_k = 0.0001 per_min; MBIEX_k is "rate for M7 and M9 export in bile";  // SBO:0000009

  // Reactions:
  CANIM: can_ext -> can; f_hepatic_function*CANIM_Vmax/CANIM_Km_can*Vli*(can_ext - can)/(1 + can_ext/CANIM_Km_can + can/CANIM_Km_can); CANIM is "canagliflozin import (CANIM)";  // SBO:0000655
  CAN2M5: can => m5; f_hepatic_function*f_ugt2b4*CAN2M5_Vmax*Vli*can/(can + CAN2M5_Km_can); CAN2M5 is "canagliflozin conversion (CAN2M5) UGT2B4";  // SBO:0000176
  CAN2M7: can => m7; f_hepatic_function*f_ugt1a9*CAN2M7_Vmax*Vli*can/(can + CAN2M7_Km_can); CAN2M7 is "canagliflozin conversion (CAN2M7) UGT1A9";  // SBO:0000176
  CAN2M9: can => m9; f_hepatic_function*f_cyp3a4*CAN2M9_Vmax*Vli*can/(can + CAN2M9_Km_can); CAN2M9 is "canagliflozin conversion (CAN2M9) CYP3A4";  // SBO:0000176
  M5EX: m5 -> m5_ext; f_hepatic_function*M5EX_Vmax/M5EX_Km_m5*Vli*(m5 - m5_ext)/(1 + m5_ext/M5EX_Km_m5 + m5/M5EX_Km_m5); M5EX is "M5 export (M5EX)";  // SBO:0000655
  M7EX: m7 -> m7_ext; f_hepatic_function*M7EX_Vmax/M7EX_Km_m7*Vli*(m7 - m7_ext)/(1 + m7_ext/M7EX_Km_m7 + m7/M7EX_Km_m7); M7EX is "M7 export (M7EX)";  // SBO:0000655
  M7BIEX: m7 => m7_bi; f_hepatic_function*MBIEX_k*Vli*m7; M7BIEX is "M7 bile export";  // SBO:0000655
  M7EHC: m7_bi => m7_lumen; M7BIEX; M7EHC is "M7 enterohepatic circulation";  // SBO:0000655
  M9BIEX: m9 => m9_bi; f_hepatic_function*MBIEX_k*Vli*m9; M9BIEX is "M9 bile export";  // SBO:0000655
  M9EHC: m9_bi => m9_lumen; M9BIEX; M9EHC is "M9 enterohepatic circulation";  // SBO:0000655

  // Unit definitions:
  unit g_per_mole = gram / mole; g_per_mole is "g/mole";
  unit l_per_min = litre / (60 second); l_per_min is "l/min";
  unit m2 = metre^2; m2 is "meter^2";
  unit mM = 1e-3 mole / litre; mM is "mmole/liter";
  unit mg = 1e-3 gram;
  unit mg_per_s_l = 1e-3 gram / (second * litre); mg_per_s_l is "mg/s/l";
  unit min = 60 second;
  unit min_per_hr = 60 second / (3600 second); min_per_hr is "min/hour";
  unit mmole = 1e-3 mole;
  unit mmole_per_min = 1e-3 mole / (60 second); mmole_per_min is "mmole/min";
  unit mmole_per_min_l = 1e-3 mole / (60 second * litre); mmole_per_min_l is "mmole/min/l";
  unit per_min = 1 / (60 second); per_min is "1/min";
  unit per_mmole = 1 / (1e-3 mole); per_mmole is "1/mmole";
end
